<?xml version="1.0" encoding="UTF-8"?>

<!--###################################################################################
    Antonov-Aircrafts and SpaceShuttle :: Herbert Wagner November2014-2015
    Development is ongoing, see latest version: www.github.com/herbyw/antonov-aircrafts
    This file is licenced under the terms of the GNU General Public Licence V3 or later
    ###################################################################################
-->

<!--
	Author: Slavutinsky Victor
-->

<!-- TDU-1 Maneur Engine -->

<rocket_engine name="OMS-main">
	<isp>               345 </isp>
	<shr>              1.23 </shr>
	<max_pc>       86556.00 </max_pc>
	<variance>         0.10 </variance>
	<prop_eff>         0.67 </prop_eff>
	<maxthrottle>      1.00 </maxthrottle>
	<minthrottle>       0.0 </minthrottle>
	<slfuelflowmax>    6.02 </slfuelflowmax>
	<sloxiflowmax>     3.16 </sloxiflowmax>
</rocket_engine>
