<?xml version="1.0" encoding="UTF-8"?>

<!--###################################################################################
    Antonov-Aircrafts and SpaceShuttle :: Herbert Wagner November2014-2015
    Development is ongoing, see latest version: www.github.com/herbyw/antonov-aircrafts
    This file is licenced under the terms of the GNU General Public Licence V3 or later
    ###################################################################################
-->

<rocket_engine name="SRB">
  <isp>                   1600  </isp>
  <maxthrottle>           1.04  </maxthrottle>
  <minthrottle>           0.35  </minthrottle>
  <max_pc>		    86556.00  </max_pc>
  <slfuelflowmax unit="LBS/SEC">  1940.0  </slfuelflowmax>
  <sloxiflowmax unit="LBS/SEC">   324.0  </sloxiflowmax>
</rocket_engine>
