<?xml version="1.0" encoding="UTF-8"?>

<!--###################################################################################
    Antonov-Aircrafts and SpaceShuttle :: Herbert Wagner November2014-2015
    Development is ongoing, see latest version: www.github.com/herbyw/antonov-aircrafts
    This file is licenced under the terms of the GNU General Public Licence V3 or later
    ###################################################################################
-->

<rocket_engine name="XLR-99">
  <isp>                    453  </isp>
  <maxthrottle>           1.04  </maxthrottle>
  <minthrottle>           0.25  </minthrottle>
  <max_pc>			86556  </max_pc>
  <slfuelflowmax unit="LBS/SEC"> 2910.0  </slfuelflowmax>
  <sloxiflowmax unit="LBS/SEC">   486.0  </sloxiflowmax>
</rocket_engine>
