<?xml version="1.0"?>

<!--
	Author: Slavutinsky Victor
-->

<!-- TDU-1 Maneur Engine -->

<rocket_engine name="XLR01">
	<isp>               300.0 </isp>
	<shr>              1.23 </shr>
	<max_pc>       86556.00 </max_pc>
	<variance>         0.10 </variance>
	<prop_eff>         0.67 </prop_eff>
	<maxthrottle>      1.00 </maxthrottle>
	<minthrottle>      0.80 </minthrottle>
	<sloxiflowmax>   10.686 </sloxiflowmax>
	<slfuelflowmax>   2.968 </slfuelflowmax>
</rocket_engine>
